**
**
**
** file created by  A N S A  Thu Jan 26 08:02:25 2017
**
** output from :
**
** /net/caev38/fs3/proj/insass38c/35up/03_SIMU/MA/Querstruktur/mit_Barriere/WS_neu_mitMPCundMasse_v2.inp
** u_mitMPCundMasse_v2.inp
**
*HEADING
**
*NODE
       1,                     160.,                    -200.,                     120.
       2,                     160.,                    -200.,                     240.
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**
** MEMBRANE and STRUCTURAL ELEMENTS
**
*ELEMENT, TYPE=S4RS, ELSET=P16100000;STF
       2,    16925,     2295,        4,     2296
       4,    16928,     2300,       67,     2301
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*ELEMENT, TYPE=S4RS, ELSET=P16100301;DEFO_RE
    1374,    20577,    12850,     1302,    12851
    1378,    20581,    12854,     1302,    12855
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*ELEMENT, TYPE=S4RS, ELSET=P16100302;DEFO_LI
       1,    21563,    14890,       11,    14891
       3,    21567,    14894,       11,    14895
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*ELEMENT, TYPE=S3RS, ELSET=P16100302;DEFO_LI
   20721,    21955,     6342,    15831
   20727,    21957,     6748,    15832
   20807,    21984,    15860,     6713
   20813,    21986,    15861,     6373
   21090,    22078,     6289,    16015
   21123,    22089,     6373,    15861
**
**
**
**
** MPC
**
*MPC
BEAM, MPC_NSET,     2294
*NSET, NSET=MPC_NSET
     380,      483,      484,      486,      491,      494
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**
** MASS and ROTARY
**
*MASS, ELSET=MS58148901;Mass_01
              0.5,
*ELEMENT, TYPE=MASS, ELSET=MS58148901;Mass_01
58148901,     2294
*ROTARY INERTIA, ELSET=RI58148903;Inertia_001
           1.E-9,            1.E-9,            1.E-9
*ELEMENT, TYPE=ROTARYI, ELSET=RI58148903;Inertia_001
58148903,     2294
**
**
**
**
** SECTION DATA
**
*SHELL SECTION, ELSET=P16100000;STF, MATERIAL=ENAW-7003-T79_277_13_IDS, CONTROLS=A16100001;SHELLCONTROLS, SECTION INTEGRATION=SIMPSON
             2.2,        5
*SHELL SECTION, ELSET=P16100301;DEFO_RE, MATERIAL=ENAW-7003-T79_277_13_IDS, CONTROLS=A16100001;SHELLCONTROLS, SECTION INTEGRATION=SIMPSON
             1.5,        5
*SHELL SECTION, ELSET=P16100302;DEFO_LI, MATERIAL=ENAW-7003-T79_277_13_IDS, CONTROLS=A16100001;SHELLCONTROLS, SECTION INTEGRATION=SIMPSON
             1.5,        5
**
**INITIAL CONDITIONS, TYPE=VELOCITY
**
*INITIAL CONDITIONS, TYPE=VELOCITY
S2;NSET_INITIAL_VEL,        1,        -5555.556
**
** SECTION CONTROLS
**
*SECTION CONTROLS, NAME=A16100001;SHELLCONTROLS, HOURGLASS=STIFFNESS
, ,
**
**
*SURFACE, NAME=G11000104;T-ALL-G11000104, TYPE=ELEMENT
S11000104;T-ALL-G11000104,
**
** SETS
**
*NSET, NSET=S2;NSET_INITIAL_VEL
       1,        2,        3,        4,        5,        6
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*ELSET, ELSET=S11000104;T-ALL-G11000104
P16100000;STF,
P16100301;DEFO_RE,
P16100302;DEFO_LI,
*ELSET, ELSET=S58148905;DEFOBOX_LH
P16100302;DEFO_LI,
*ELSET, ELSET=S58148906;DEFOBOX_RH
P16100301;DEFO_RE,
*ELSET, ELSET=S58148907;STF
P16100000;STF,
**
*SURFACE, NAME=G1;DEFOBOX_LH, TYPE=CUTTING SURFACE, DEFINITION=COORDINATES
            424.,             31.5,             175.,               1.,               0.,               0.
S58148905;DEFOBOX_LH,
*INTEGRATED OUTPUT SECTION, NAME=G1;DEFOBOX_LH, SURFACE=G1;DEFOBOX_LH
*SURFACE, NAME=G2;DEFOBOX_RH, TYPE=CUTTING SURFACE, DEFINITION=COORDINATES
            424.,             920.,             175.,               1.,               0.,               0.
S58148906;DEFOBOX_RH,
*INTEGRATED OUTPUT SECTION, NAME=G2;DEFOBOX_RH, SURFACE=G2;DEFOBOX_RH
*SURFACE, NAME=C3;SFQT, TYPE=CUTTING SURFACE, DEFINITION=COORDINATES
                    180.,        754.4830999999999,                     240.,                       0.,                       1.,                       0.
S58148907;STF,
*INTEGRATED OUTPUT SECTION, NAME=C3;SFQT, SURFACE=C3;SFQT
**
** STEPS
**
** *INCLUDE, INPUT=matdb_v2.31_bi_abq611_bmw_2017-03-31.inc, PASSWORD=matdb_v2.31_bi_abq611_bmw_2017-03-31
*INCLUDE, INPUT=matdb_v2.33_bi_abq611_bmw_2017-10-31.inc, PASSWORD=matdb_v2.33_bi_abq611_bmw_2017-10-31
*INCLUDE, INPUT=OKL_KOM_Barriere_Front_Flat_150_Small-Overlap-Barrier_2012_RED_DIV_arc_and_flat.inc
**
**
*SURFACE INTERACTION, NAME=A590002;SI-Frict_0p12
*FRICTION
0.12,
*SURFACE, NAME=G590010;SURF-all_ohne_EI_EP_Barriere
P16100000;STF,
P16100302;DEFO_LI,
P16100301;DEFO_RE,
*INCLUDE, INPUT = SFS_CEDEF_INC.inc
*INCLUDE, INPUT = SFS_CSDEF_INC.inc
**
** STEP 1
**
*STEP, NAME=Anonymous STEP 1
*DYNAMIC, EXPLICIT, ELEMENT BY ELEMENT, IMPROVED DT METHOD=YES
,              0.1
*VARIABLE MASS SCALING, TYPE=BELOW MIN, DT=5.E-7, FREQUENCY=10
*DIAGNOSTICS, CONTACT INITIAL OVERCLOSURE=DETAIL, DETECT CROSSED SURFACES=ON
**
** BOUNDARY
**
*BOUNDARY, TYPE=DISPLACEMENT
    2294,        3,        6,               0.
**
** CONTACT DEFINITIONS
**
*CONTACT
*CONTACT CONTROLS ASSIGNMENT, AUTOMATIC OVERCLOSURE RESOLUTION
, , STORE OFFSETS
*CONTACT CONTROLS ASSIGNMENT, NODAL EROSION=YES
*CONTACT INCLUSIONS, ALL EXTERIOR
*CONTACT PROPERTY ASSIGNMENT
G580000;C-SURF-all_Barriere, G11000104;T-ALL-G11000104, A590002;SI-Frict_0p12
G11000104;T-ALL-G11000104, G11000104;T-ALL-G11000104, A590002;SI-Frict_0p12
*SURFACE PROPERTY ASSIGNMENT, PROPERTY=FEATURE EDGE CRITERIA
G11000104;T-ALL-G11000104, ALL EDGES
**
** DELETION OF FREE NODES FOR DELETED ELEMENTS
*SURFACE PROPERTY ASSIGNMENT, PROPERTY=THICKNESS
G11000104;T-ALL-G11000104, ORIGINAL,
*CONTACT CONTROLS ASSIGNMENT, CONTACT THICKNESS REDUCTION=NONE
G11000104;T-ALL-G11000104
**
*OUTPUT, FIELD, TIME INTERVAL=0.001
*NODE OUTPUT
TIEDSTATUS,
UT,
** *ELEMENT OUTPUT
** DMICRTMAX,
** EMSF,
** PEEQMAX,
** STATUS,
** CDIP,
** *ELEMENT OUTPUT
** ELASE,
** ELCD,
** ELDC,
** ELDMD,
** ELEN,
** ELIHE,
** ELPD,
** ELSE,
** ELVD,
** NFORC,
*ENERGY OUTPUT, PER ELEMENT SET
ALLSE, ALLIE, ALLKE, ETOTAL
*CONTACT OUTPUT
CFORCE,
CSTRESS,
*OUTPUT, HISTORY, TIME INTERVAL=0.0005
*ENERGY OUTPUT, VARIABLE=ALL
*INCREMENTATION OUTPUT
DMASS,
DT,
** *ENERGY OUTPUT, PER SECTION
** ALLIE,
** ALLSE,
** OUTPUT, HISTORY, TIME INTERVAL=0.0005, FILTER=ANTIALIASING
** *INTEGRATED OUTPUT, SECTION=G1;DEFOBOX_LH, VARIABLE=ALL
** SOF,
** SOM,
** *INTEGRATED OUTPUT, SECTION=G2;DEFOBOX_RH, VARIABLE=ALL
** SOF,
** SOM,
** *INTEGRATED OUTPUT, SECTION=C3;SFQT, VARIABLE=ALL
** SOF,
** SOM,
** *ENERGY OUTPUT, ELSET=S58148905;DEFOBOX_LH
** ALLIE,
** *ENERGY OUTPUT, ELSET=S58148906;DEFOBOX_RH
** ALLIE,
** *ENERGY OUTPUT, ELSET=S58148907;STF
** ALLIE,
*NODE OUTPUT, NSET=S58000001;Einspannung_Barriere
RF,
RT,
RM,
*NODE OUTPUT, NSET=S58000002;Einspannung_Barriere_Arc
RF,
RT,
RM,
*CONTACT OUTPUT, SURFACE=G580001;C-SURF-Barriere_flat
CFN,
CFS,
*CONTACT OUTPUT, SURFACE=G580002;C-SURF-Barriere_arc
CFN,
CFS,
*INCLUDE, INPUT = SFS_CSOUT_INC.inc
*INCLUDE, INPUT = SFS_CEOUT_INC.inc
*END STEP
